// COMSOL Multiphysics 6.1.0.357 model "PINNinterpolation.mph"
// Outline of the model tree

Parameters
  Lx = 0.35 [m]  // plate length
  Ly = 0.2 [m]  // plate width
  Lz = 0.003 [m]  // plate thickness
  fx = 0.05 [m]  // excitation point - x coordinate
  fy = 0.05 [m]  // excitation point - y coordinate

Common definitions
  mpf1: ParticipationFactors

Geometry
  geom1 "Geometry 1" (3D, length unit m)
    blk1: Block | size = {Ly, Lx, Lz}
    cyl1: Cylinder | pos = {fx, fy, -0.05}; r = 0.001; h = 0.1
    int1: Intersection | input = blk1, cyl1; keep = on
    del1: Delete "Delete Entities 1" | input = cyl1
    fin: Finalize "Form Union"

Materials
  mat1: Common "Aluminum [solid,bulk]" on all domains
    def "Basic"
      thermalconductivity = k_solid_bulk_1(T)
      resistivity = res_solid_1(T)
      thermalexpansioncoefficient = (alpha_solid_1(T)+(Tempref-293[K])*if(abs(T-Tempref)>1e-3,(alpha_solid_1(T)-alpha_solid_1(Tempref))/(T-Tempref),d(alpha_solid_1(T),T)))/(1+alpha_solid_1(Tempref)*(Tempref-293[K]))
      heatcapacity = C_solid_1(T)
      electricconductivity = sigma_solid_1(T)
      HC = HC_solid_1(T)
      VP = VP_solid_1(T)
      density = rho_solid_1(T)
      TD = TD_solid_bulk_1(T)
      k_solid_bulk_1: Piecewise
        arg = T
        pieces = 
          {0.0, 14.0, 3805.9257*T^1+248.253751*T^2-64.8829086*T^3+2.73457966*T^4-0.0187346194*T^5}
          {14.0, 30.0, 17649.5661+3071.71083*T^1-356.155686*T^2+12.1632633*T^3-0.139143056*T^4}
          {30.0, 60.0, 54213.1094-3716.7432*T^1+102.759822*T^2-1.3121209*T^3+0.00641434375*T^4}
          {60.0, 90.0, 16865.6571-727.283333*T^1+12.6041667*T^2-0.100666667*T^3+3.08333333E-4*T^4}
          {90.0, 100.0, 5295.0046-144.833278*T^1+1.56558379*T^2-0.00751036234*T^3+1.34350403E-5*T^4}
          {100.0, 207.0, 5666.70732-182.039979*T^1+2.55413737*T^2-0.0190491433*T^3+7.93330491E-5*T^4-1.74616787E-7*T^5+1.5857953E-10*T^6}
          {207.0, 425.0, 464.138175-2.83651472*T^1+0.0125251645*T^2-2.33826954E-5*T^3+1.56955919E-8*T^4}
          {425.0, 933.5, 265.070681-0.150430674*T^1+3.85488463E-4*T^2-5.21464711E-7*T^3+2.24638309E-10*T^4}
        argunit = K
        fununit = W/(m*K)
      res_solid_1: Piecewise
        arg = T
        pieces = 
          {1.0, 19.5, 1.091612E-12-1.10726E-13*T^1+3.696901E-14*T^2-2.781934E-15*T^3+1.008733E-16*T^4}
          {19.5, 50.6, -3.323487E-11+7.29041E-12*T^1-4.771551E-13*T^2+1.071535E-14*T^3}
          {50.6, 200.0, 1.0445563E-10-3.988929E-11*T^1+1.061978E-12*T^2-2.337666E-15*T^3}
          {200.0, 933.16, -1.037048E-8+1.451201E-10*T^1-8.192563E-14*T^2+6.619834E-17*T^3}
        argunit = K
        fununit = ohm*m
      alpha_solid_1: Piecewise
        arg = T
        pieces = 
          {10.0, 137.0, 1.43109188E-5+3.37038626E-8*T^1+8.16435956E-10*T^2-1.08888719E-11*T^3+5.23223423E-14*T^4-8.82682652E-17*T^5}
          {137.0, 247.0, 2.07834478E-5-4.08338871E-8*T^1+2.32930107E-10*T^2+1.49187457E-12*T^3-1.07271913E-14*T^4+1.67112321E-17*T^5}
          {247.0, 933.16, 7.73307064E-6+1.51327401E-7*T^1-5.79889205E-10*T^2+1.08298998E-12*T^3-9.44189288E-16*T^4+3.12958753E-19*T^5}
        argunit = K
        fununit = 1/K
      C_solid_1: Piecewise
        arg = T
        pieces = 
          {10.0, 26.0, 10.0147917-3.90760773*T^1+0.648758442*T^2-0.0548161053*T^3+0.00262892806*T^4-6.45484119E-5*T^5+6.54234808E-7*T^6}
          {26.0, 108.0, -71.838152+9.71552515*T^1-0.55581666*T^2+0.0172355785*T^3-2.25678347E-4*T^4+1.36370432E-6*T^5-3.14875506E-9*T^6}
          {108.0, 300.0, -892.25551+28.0210131*T^1-0.219689057*T^2+0.00103357024*T^3-2.84563726E-6*T^4+4.15606786E-9*T^5-2.45888664E-12*T^6}
          {300.0, 933.16, 663.125754+1.17769949*T^1-0.00154549231*T^2+1.04234523E-6*T^3}
        argunit = K
        fununit = J/(kg*K)
      sigma_solid_1: Piecewise
        arg = T
        pieces = 
          {1.0, 19.5, 1/(1.008733E-16*T^4-2.781934E-15*T^3+3.696901E-14*T^2-1.107260E-13*T+1.091612E-12)}
          {19.5, 50.6, 1/(1.071535E-14*T^3-4.771551E-13*T^2+7.290410E-12*T-3.323487E-11)}
          {50.6, 200.0, 1/(-2.337666E-15*T^3+1.061978E-12*T^2-3.988929E-11*T+1.0445563E-10)}
          {200.0, 933.16, 1/(6.619834E-17*T^3-8.192563E-14*T^2+1.451201E-10*T-1.037048E-08)}
        argunit = K
        fununit = S/m
      HC_solid_1: Piecewise
        arg = T
        pieces = 
          {10.0, 26.0, 0.270214103-0.105433118*T^1+0.0175044759*T^2-0.00147902075*T^3+7.09324227E-5*T^4-1.74161297E-6*T^5+1.76522365E-8*T^6}
          {26.0, 108.0, -1.93830109+0.262139441*T^1-0.0149967672*T^2+4.65041763E-4*T^3-6.08914034E-6*T^4+3.67947882E-8*T^5-8.49581346E-11*T^6}
          {108.0, 300.0, -24.0743921+0.756048963*T^1-0.00592754029*T^2+2.78872755E-5*T^3-7.67795618E-8*T^4+1.12136945E-10*T^5-6.634445E-14*T^6}
          {300.0, 933.16, 17.8921265+0.0317760987*T^1-4.16997008E-5*T^2+2.81240378E-8*T^3}
        argunit = K
        fununit = J/(mol*K)
      VP_solid_1: Piecewise | arg = T; pieces = {293.0, 933.16, (exp((-1.73420000e+04/T-7.92700000e-01*log10(T)+1.23398100e+01)*log(10.0)))*1.33320000e+02}; argunit = K; fununit = Pa
      rho_solid_1: Piecewise
        arg = T
        pieces = 
          {10.0, 247.0, 2734.57514-0.0398881851*T^1+0.00187559788*T^2-3.69839365E-5*T^3+2.55112441E-7*T^4-8.1685655E-10*T^5+1.00385922E-12*T^6}
          {247.0, 933.16, 2751.77566-0.179058415*T^1+4.65832302E-5*T^2-1.51653304E-7*T^3+6.83086165E-11*T^4+8.71886752E-16*T^5-2.11179857E-18*T^6}
        argunit = K
        fununit = kg/m^3
      TD_solid_bulk_1: Piecewise
        arg = T
        pieces = 
          {20.0, 74.0, exp(-5807.88202+9180.60153*log(T)^1-6008.76256*log(T)^2+2086.0455*log(T)^3-405.314165*log(T)^4+41.7772226*log(T)^5-1.78390161*log(T)^6)}
          {74.0, 329.0, exp(-6160.54247+7781.80151*log(T)^1-4051.85204*log(T)^2+1114.52801*log(T)^3-171.115377*log(T)^4+13.9200755*log(T)^5-0.469134794*log(T)^6)}
          {329.0, 933.16, exp(63264.9872-60576.1854*log(T)^1+24137.9525*log(T)^2-5124.1508*log(T)^3+611.192838*log(T)^4-38.8356702*log(T)^5+1.02695017*log(T)^6)}
        argunit = K
        fununit = m^2/s
    ThermalExpansion
      alphatan = CTE_solid_1(T)
      dL = (dL_solid_1(T)-dL_solid_1(Tempref))/(1+dL_solid_1(Tempref))
      dL_solid_1: Piecewise
        arg = T
        pieces = 
          {10.0, 25.0, -0.00416732581-3.26820168E-13*T^1-6.40537926E-9*T^2+7.35005611E-10*T^3-3.34650303E-11*T^4+1.0196671E-12*T^5-9.00232037E-15*T^6}
          {25.0, 189.0, -0.00424379768+7.68932463E-6*T^1-2.86497054E-7*T^2+4.90825879E-9*T^3-3.08623048E-11*T^4+8.74528953E-14*T^5-8.97335932E-17*T^6}
          {189.0, 933.16, -0.00226518274-3.66079307E-5*T^1+3.21234948E-7*T^2-8.97205299E-10*T^3+1.35963749E-12*T^4-1.03588624E-15*T^5+3.12958765E-19*T^6}
        argunit = K
      CTE_solid_1: Piecewise
        arg = T
        pieces = 
          {10.0, 27.0, 3.26614079E-8-1.2811084E-8*T^1+2.2050497E-9*T^2-1.3386148E-10*T^3+5.0983621E-12*T^4-5.4014065E-14*T^5}
          {27.0, 79.0, -3.29120927E-6+3.06868839E-7*T^1-1.00481619E-8*T^2+1.72476772E-10*T^3-8.8460608E-13*T^4}
          {79.0, 230.0, -2.28632108E-5+6.67491471E-7*T^1-4.40262199E-9*T^2+1.45535841E-11*T^3-1.91062188E-14*T^4}
          {230.0, 900.0, 1.24556905E-5+5.05077193E-8*T^1-5.80655625E-11*T^2+3.01430546E-14*T^3}
        argunit = K
        fununit = 1/K
    Enu "Young's modulus and Poisson's ratio"
      E = E(T)
      nu = nu(T)
      E: Piecewise | arg = T; pieces = {0.0, 773.16, 7.659324E10+2007396.0*T^1-186458.4*T^2+419.2175*T^3-0.3495083*T^4}; argunit = K; fununit = Pa
      nu: Piecewise | arg = T; pieces = {0.0, 773.16, 0.3238668+3.754548E-6*T^1+2.213647E-7*T^2-6.565023E-10*T^3+4.21277E-13*T^4+3.170505E-16*T^5}; argunit = K
    KG "Bulk modulus and shear modulus"
      K = kappa(T)
      G = mu(T)
      mu: Piecewise | arg = T; pieces = {0.0, 773.16, 2.894653E10-120032.4*T^1-69037.36*T^2+158.6722*T^3-0.1348974*T^4}; argunit = K; fununit = Pa
      kappa: Piecewise | arg = T; pieces = {0.0, 773.16, 7.252413E10+1872882.0*T^1-71106.44*T^2+52.7109*T^3}; argunit = K; fununit = Pa

Physics
  solid: SolidMechanics on all domains
    dependent variable u = {u, v, w}
    lemm1: LinearElasticModel "Linear Elastic Material 1" (default)
      dmp1: Damping on all domains | alpha_dM = 19; beta_dK = 1e-6
    free1: Free (default)
    init1: init "Initial Values 1" (default)
    bndl1: BoundaryLoad on boundaries 9 | FperArea = {0, 0, -1}

Mesh
  mesh1 "Mesh 1" (physics-controlled)

Studies
  std1 "Study 1: Eigenfrequency, wo damping"
    eig: Eigenfrequency
      neigs = 25
      shift = 1[Hz]
      conrad = 1
      linpsolnum = auto
      disabledphysics = {solid/lemm1/dmp1, solid/bndl1}
  std2 "Study 2: Eigenfrequency, w damping"
    eig: Eigenfrequency | neigs = 25; shift = 1[Hz]; conrad = 1; linpsolnum = auto; disabledphysics = solid/bndl1
  std3 "Study 3: Frequency Study, wo damping"
    freq: Frequency "Frequency Domain" | plist = range(1,1,1024); disabledphysics = solid/lemm1/dmp1
  std4 "Study 4: Frequency Study, w damping"
    freq: Frequency "Frequency Domain" | plist = range(1,1,1024)

Solver configurations
  sol1 "Solution 1" (study std1)
    v1: Variables "Dependent Variables 1"
    e1: Eigenvalue "Eigenvalue Solver 1" | eigvfunscale = maximum; eigvfunscaleparam = 4.03E-7
      dDef: Direct
  sol2 "Solution 2" (study std2)
    // same settings as sol1
  sol3 "Solution 3" (study std3)
    v1: Variables "Dependent Variables 1"
    s1: Stationary "Stationary Solver 1" | linpmethod = sol
      p1: Parametric | pname = freq; plistarr = range(1,1,1024); punit = Hz; pcontinuationmode = no
      fc1: FullyCoupled | linsolver = d1
      d1: Direct "Suggested Direct Solver (solid)" | linsolver = pardiso; pivotperturb = 1.0E-9
  sol4 "Solution 4" (study std4)
    // same settings as sol3

Datasets
  dset1: Solution | solution = sol1
  dset2: Solution | solution = sol2
  dset3: Solution | solution = sol3
  dset4: Solution | solution = sol4

Evaluation groups
  std1EvgFrq: EvaluationGroup "Eigenfrequencies (Study 1: Eigenfrequency, wo damping)" | data = dset1
    gev1: EvalGlobal "Global Evaluation 1"
      expr = {2*pi*freq, imag(freq)/abs(freq), abs(freq)/imag(freq)/2}
      unit = {rad/s, 1, 1}
      descr = {Angular frequency, Damping ratio, Quality factor}
  std1mpf1: EvaluationGroup "Participation Factors (Study 1: Eigenfrequency, wo damping)" | data = dset1
    gev1: EvalGlobal "Global Evaluation 1"
      expr = {mpf1.pfLnormX, mpf1.pfLnormY, mpf1.pfLnormZ, mpf1.pfRnormX, mpf1.pfRnormY, mpf1.pfRnormZ, mpf1.mEffLX, mpf1.mEffLY, mpf1.mEffLZ, mpf1.mEffRX, mpf1.mEffRY, mpf1.mEffRZ}
      unit = {1, 1, 1, 1, 1, 1, kg, kg, kg, kg*m^2, kg*m^2, kg*m^2}
      descr = {"Participation factor, normalized, X-translation", "Participation factor, normalized, Y-translation", "Participation factor, normalized, Z-translation", "Participation factor, normalized, X-rotation", "Participation factor, normalized, Y-rotation", "Participation factor, normalized, Z-rotation", "Effective modal mass, X-translation", "Effective modal mass, Y-translation", "Effective modal mass, Z-translation", "Effective modal mass, X-rotation", "Effective modal mass, Y-rotation", "Effective modal mass, Z-rotation"}
  std2EvgFrq: EvaluationGroup "Eigenfrequencies (Study 2: Eigenfrequency, w damping)" | data = dset2
    gev1: EvalGlobal "Global Evaluation 1"
      expr = {2*pi*freq, imag(freq)/abs(freq), abs(freq)/imag(freq)/2}
      unit = {rad/s, 1, 1}
      descr = {Angular frequency, Damping ratio, Quality factor}
  std2mpf1: EvaluationGroup "Participation Factors (Study 2: Eigenfrequency, w damping)" | data = dset2
    gev1: EvalGlobal "Global Evaluation 1"
      expr = {mpf1.pfLnormX, mpf1.pfLnormY, mpf1.pfLnormZ, mpf1.pfRnormX, mpf1.pfRnormY, mpf1.pfRnormZ, mpf1.mEffLX, mpf1.mEffLY, mpf1.mEffLZ, mpf1.mEffRX, mpf1.mEffRY, mpf1.mEffRZ}
      unit = {1, 1, 1, 1, 1, 1, kg, kg, kg, kg*m^2, kg*m^2, kg*m^2}
      descr = {"Participation factor, normalized, X-translation", "Participation factor, normalized, Y-translation", "Participation factor, normalized, Z-translation", "Participation factor, normalized, X-rotation", "Participation factor, normalized, Y-rotation", "Participation factor, normalized, Z-rotation", "Effective modal mass, X-translation", "Effective modal mass, Y-translation", "Effective modal mass, Z-translation", "Effective modal mass, X-rotation", "Effective modal mass, Y-rotation", "Effective modal mass, Z-rotation"}

Plots
  pg1: PlotGroup3D "Mode Shape (solid): wo damping" | data = dset1
    surf1: Surface | expr = w; descr = Displacement field, Z-component
      def: Deform "Deformation" | expr = {u, v, w}; descr = Displacement field
  pg2: PlotGroup3D "Mode Shape (solid): w damping" | data = dset2
    surf1: Surface | expr = real(w)
      def: Deform "Deformation" | expr = {u, v, w}; descr = Displacement field
  pg3: PlotGroup3D "Forced Displacement (solid): wo damping" | data = dset3
    vol1: Volume | expr = w
      def: Deform "Deformation" | expr = {u, v, w}; descr = Displacement field
  pg4: PlotGroup3D "Forced Displacement (solid): w damping" | data = dset4
    vol1: Volume | expr = imag(w)
      def: Deform "Deformation" | expr = {u, v, w}; descr = Displacement field